<?xml version="1.0"?>
<!--
  VTOL Delivery Drone - 10" Lift Propeller
  Designed for efficient hover at 9.8kg with 8 motors
  Target: ~12.5N per motor at hover (96N total / 8 = 12N each)
  Max: ~25N per motor for 2:1 thrust-to-weight at MTOW
-->
<propeller name="VTOL_10inch_Lift" version="1.1">
  <!-- Moment of inertia about propeller axis -->
  <!-- I = (1/12) * m * D^2, for 10" prop ~40g -->
  <ixx unit="KG*M2">2.15e-04</ixx>

  <!-- Propeller diameter -->
  <diameter unit="IN">10.0</diameter>

  <!-- Number of blades -->
  <numblades>2</numblades>

  <!-- Fixed pitch propeller (0 = fixed, 1 = constant speed) -->
  <constspeed>0</constspeed>

  <!-- Thrust coefficient table (Ct vs advance ratio J) -->
  <!-- Based on APC 10x4.5 style prop data, scaled for hover efficiency -->
  <table name="C_THRUST" type="internal">
    <tableData>
      0.0000  0.1350
      0.0200  0.1330
      0.0500  0.1305
      0.0800  0.1275
      0.1000  0.1250
      0.1250  0.1218
      0.1500  0.1180
      0.1750  0.1140
      0.2000  0.1095
      0.2250  0.1048
      0.2500  0.0998
      0.2750  0.0945
      0.3000  0.0890
      0.3250  0.0832
      0.3500  0.0772
      0.3750  0.0710
      0.4000  0.0645
      0.4250  0.0578
      0.4500  0.0510
      0.4750  0.0440
      0.5000  0.0368
      0.5250  0.0295
      0.5500  0.0220
      0.5750  0.0145
      0.6000  0.0068
      0.6250  -0.0010
    </tableData>
  </table>

  <!-- Power coefficient table (Cp vs advance ratio J) -->
  <table name="C_POWER" type="internal">
    <tableData>
      0.0000  0.0720
      0.0200  0.0705
      0.0500  0.0688
      0.0800  0.0668
      0.1000  0.0652
      0.1250  0.0632
      0.1500  0.0610
      0.1750  0.0585
      0.2000  0.0558
      0.2250  0.0530
      0.2500  0.0500
      0.2750  0.0468
      0.3000  0.0435
      0.3250  0.0400
      0.3500  0.0365
      0.3750  0.0328
      0.4000  0.0290
      0.4250  0.0252
      0.4500  0.0213
      0.4750  0.0175
      0.5000  0.0138
      0.5250  0.0102
      0.5500  0.0068
      0.5750  0.0038
      0.6000  0.0012
      0.6250  -0.0008
    </tableData>
  </table>
</propeller>
