<?xml version="1.0"?>
<!--
  VTOL Delivery Drone - 11" Pusher Propeller
  Optimized for cruise efficiency at 70 mph (31 m/s)
  Higher pitch for cruise thrust, lower static thrust than lift props
-->
<propeller name="VTOL_11inch_Pusher" version="1.1">
  <!-- Moment of inertia about propeller axis -->
  <ixx unit="KG*M2">2.85e-04</ixx>

  <!-- Propeller diameter -->
  <diameter unit="IN">11.0</diameter>

  <!-- Number of blades -->
  <numblades>2</numblades>

  <!-- Fixed pitch propeller -->
  <constspeed>0</constspeed>

  <!-- Thrust coefficient table - optimized for cruise (higher J operation) -->
  <table name="C_THRUST" type="internal">
    <tableData>
      0.0000  0.1150
      0.0500  0.1130
      0.1000  0.1100
      0.1500  0.1065
      0.2000  0.1025
      0.2500  0.0980
      0.3000  0.0932
      0.3500  0.0880
      0.4000  0.0825
      0.4500  0.0768
      0.5000  0.0708
      0.5500  0.0645
      0.6000  0.0580
      0.6500  0.0512
      0.7000  0.0442
      0.7500  0.0370
      0.8000  0.0295
      0.8500  0.0218
      0.9000  0.0140
      0.9500  0.0060
      1.0000  -0.0022
    </tableData>
  </table>

  <!-- Power coefficient table -->
  <table name="C_POWER" type="internal">
    <tableData>
      0.0000  0.0580
      0.0500  0.0570
      0.1000  0.0558
      0.1500  0.0545
      0.2000  0.0530
      0.2500  0.0512
      0.3000  0.0493
      0.3500  0.0472
      0.4000  0.0450
      0.4500  0.0426
      0.5000  0.0400
      0.5500  0.0373
      0.6000  0.0344
      0.6500  0.0314
      0.7000  0.0282
      0.7500  0.0250
      0.8000  0.0216
      0.8500  0.0181
      0.9000  0.0146
      0.9500  0.0110
      1.0000  0.0074
    </tableData>
  </table>
</propeller>
