<?xml version="1.0" ?>
<fdm_config xmlns:xsi="http://www.w3.org/2001/XMLSchema-instance" name="vtol_delivery_drone" version="2.0" release="ALPHA" xsi:noNamespaceSchemaLocation="http://jsbsim.sourceforge.net/JSBSim.xsd">


  <fileheader>


    <author>Kyle - Converted from AeroSandbox Model</author>


    <filecreationdate>2026-01-02</filecreationdate>


    <version>1.0</version>


    <description>
      VTOL Delivery Drone - Standard VTOL configuration
      8x octocopter lift motors + 1x tilting pusher
      V-tail for pitch/yaw control in forward flight
      Split ailerons for roll control
    </description>


  </fileheader>


  <metrics>


    <wingarea unit="M2">0.3696</wingarea>


    <wingspan unit="M">2.1</wingspan>


    <chord unit="M">0.176</chord>


    <htailarea unit="M2">0.080</htailarea>


    <htailarm unit="M">0.605</htailarm>


    <vtailarea unit="M2">0.067</vtailarea>


    <vtailarm unit="M">0.605</vtailarm>


    <location name="AERORP" unit="M">


      <x>0.364</x>


      <y>0.0</y>


      <z>-0.074</z>


    </location>


    <location name="EYEPOINT" unit="M">


      <x>0.200</x>


      <y>0.0</y>


      <z>-0.150</z>


    </location>


    <location name="VRP" unit="M">


      <x>0.0</x>


      <y>0.0</y>


      <z>0.0</z>


    </location>


  </metrics>


  <mass_balance>


    <emptywt unit="KG">5.62</emptywt>  <!-- Empty weight: 3D printed frame (2.72kg) + 9x U5 II motors (1.37kg) + ESCs/FC/wiring (1.53kg) -->

    <location name="CG" unit="M">
      <x>0.319</x>  <!-- CG at thrust center (scaled) -->
      <y>0.0</y>
      <z>-0.030</z>
    </location>

    <!-- Moments of inertia scaled to 6.57kg hover-test AUW (mass ratio 6.57/10.1 = 0.651) -->
    <!-- TODO: replace with values from CAD mass properties after printing -->
    <ixx unit="KG*M2">0.402</ixx>
    <iyy unit="KG*M2">0.568</iyy>
    <izz unit="KG*M2">0.781</izz>
    <ixy unit="KG*M2">0.0</ixy>
    <ixz unit="KG*M2">0.0</ixz>
    <iyz unit="KG*M2">0.0</iyz>

    <!-- Battery: 6S 8000mAh LiPo -->
    <pointmass name="Battery">
      <weight unit="KG">0.95</weight>  <!-- 6S 8000mAh (~950g actual) -->
      <location unit="M">
        <x>0.319</x>  <!-- At CG -->
        <y>0.0</y>
        <z>0.0</z>
      </location>
    </pointmass>

    <!-- Payload: none for hover test (add when validating delivery ops) -->
    <pointmass name="Payload">
      <weight unit="KG">0.0</weight>  <!-- 0kg for initial hover/SITL validation -->
      <location unit="M">
        <x>0.319</x>  <!-- At CG -->
        <y>0.0</y>
        <z>0.050</z>


      </location>


    </pointmass>


  </mass_balance>


  <ground_reactions>


    <contact type="STRUCTURE" name="front_left_leg">


      <location unit="M">


        <x>0.042</x>


        <y>-0.800</y>


        <z>-0.235</z>


      </location>


      <static_friction>0.8</static_friction>


      <dynamic_friction>0.5</dynamic_friction>


      <spring_coeff unit="N/M">4000</spring_coeff>


      <damping_coeff unit="N/M/SEC">400</damping_coeff>


    </contact>


    <contact type="STRUCTURE" name="front_right_leg">


      <location unit="M">


        <x>0.042</x>


        <y>0.800</y>


        <z>-0.235</z>


      </location>


      <static_friction>0.8</static_friction>


      <dynamic_friction>0.5</dynamic_friction>


      <spring_coeff unit="N/M">4000</spring_coeff>


      <damping_coeff unit="N/M/SEC">400</damping_coeff>


    </contact>


    <contact type="STRUCTURE" name="rear_left_leg">


      <location unit="M">


        <x>0.596</x>


        <y>-0.800</y>


        <z>-0.143</z>


      </location>


      <static_friction>0.8</static_friction>


      <dynamic_friction>0.5</dynamic_friction>


      <spring_coeff unit="N/M">4000</spring_coeff>


      <damping_coeff unit="N/M/SEC">400</damping_coeff>


    </contact>


    <contact type="STRUCTURE" name="rear_right_leg">


      <location unit="M">


        <x>0.596</x>


        <y>0.800</y>


        <z>-0.143</z>


      </location>


      <static_friction>0.8</static_friction>


      <dynamic_friction>0.5</dynamic_friction>


      <spring_coeff unit="N/M">4000</spring_coeff>


      <damping_coeff unit="N/M/SEC">400</damping_coeff>


    </contact>


    <contact type="STRUCTURE" name="nose">


      <location unit="M">


        <x>0.000</x>


        <y>0.0</y>


        <z>-0.168</z>


      </location>


      <static_friction>0.8</static_friction>


      <dynamic_friction>0.5</dynamic_friction>


      <spring_coeff unit="N/M">5000</spring_coeff>


      <damping_coeff unit="N/M/SEC">500</damping_coeff>


    </contact>


    <contact type="STRUCTURE" name="tail">


      <location unit="M">


        <x>1.008</x>


        <y>0.0</y>


        <z>-0.168</z>


      </location>


      <static_friction>0.8</static_friction>


      <dynamic_friction>0.5</dynamic_friction>


      <spring_coeff unit="N/M">5000</spring_coeff>


      <damping_coeff unit="N/M/SEC">500</damping_coeff>


    </contact>


    <contact type="STRUCTURE" name="vtail_left">


      <location unit="M">


        <x>0.932</x>


        <y>0.264</y>


        <z>-0.249</z>


      </location>


      <static_friction>0.8</static_friction>


      <dynamic_friction>0.5</dynamic_friction>


      <spring_coeff unit="N/M">3000</spring_coeff>


      <damping_coeff unit="N/M/SEC">300</damping_coeff>


    </contact>


    <contact type="STRUCTURE" name="vtail_right">


      <location unit="M">


        <x>0.932</x>


        <y>-0.264</y>


        <z>-0.249</z>


      </location>


      <static_friction>0.8</static_friction>


      <dynamic_friction>0.5</dynamic_friction>


      <spring_coeff unit="N/M">3000</spring_coeff>


      <damping_coeff unit="N/M/SEC">300</damping_coeff>


    </contact>


    <contact type="STRUCTURE" name="wing_left_tip">


      <location unit="M">


        <x>0.336</x>


        <y>-1.250</y>


        <z>-0.062</z>


      </location>


      <static_friction>0.8</static_friction>


      <dynamic_friction>0.5</dynamic_friction>


      <spring_coeff unit="N/M">2000</spring_coeff>


      <damping_coeff unit="N/M/SEC">200</damping_coeff>


    </contact>


    <contact type="STRUCTURE" name="wing_right_tip">


      <location unit="M">


        <x>0.336</x>


        <y>1.250</y>


        <z>-0.062</z>


      </location>


      <static_friction>0.8</static_friction>


      <dynamic_friction>0.5</dynamic_friction>


      <spring_coeff unit="N/M">2000</spring_coeff>


      <damping_coeff unit="N/M/SEC">200</damping_coeff>


    </contact>


  </ground_reactions>


  <system name="motor-control">


    <property value="0.0">fcs/esc-cmd-norm[0]</property>


    <property value="0.0">fcs/esc-cmd-norm[1]</property>


    <property value="0.0">fcs/esc-cmd-norm[2]</property>


    <property value="0.0">fcs/esc-cmd-norm[3]</property>


    <property value="0.0">fcs/esc-cmd-norm[4]</property>


    <property value="0.0">fcs/esc-cmd-norm[5]</property>


    <property value="0.0">fcs/esc-cmd-norm[6]</property>


    <property value="0.0">fcs/esc-cmd-norm[7]</property>


    <property value="0.0">fcs/esc-cmd-norm[8]</property>


    <property value="0.0">fcs/vtail-left-cmd-norm</property>


    <property value="0.0">fcs/vtail-right-cmd-norm</property>


    <property value="0.0">fcs/aileron-left-cmd-norm</property>


    <property value="0.0">fcs/aileron-right-cmd-norm</property>


    <property value="0.0">fcs/pusher-tilt-norm</property>


    <channel name="Motor_0">


      <actuator name="fcs/esc/motor_0">


        <input>fcs/esc-cmd-norm[0]</input>


        <rate_limit>4.0</rate_limit>


        <clipto>


          <min>0.0</min>


          <max>1.0</max>


        </clipto>


        <output>fcs/esc-out[0]</output>


      </actuator>


    </channel>


    <channel name="Motor_1">


      <actuator name="fcs/esc/motor_1">


        <input>fcs/esc-cmd-norm[1]</input>


        <rate_limit>4.0</rate_limit>


        <clipto>


          <min>0.0</min>


          <max>1.0</max>


        </clipto>


        <output>fcs/esc-out[1]</output>


      </actuator>


    </channel>


    <channel name="Motor_2">


      <actuator name="fcs/esc/motor_2">


        <input>fcs/esc-cmd-norm[2]</input>


        <rate_limit>4.0</rate_limit>


        <clipto>


          <min>0.0</min>


          <max>1.0</max>


        </clipto>


        <output>fcs/esc-out[2]</output>


      </actuator>


    </channel>


    <channel name="Motor_3">


      <actuator name="fcs/esc/motor_3">


        <input>fcs/esc-cmd-norm[3]</input>


        <rate_limit>4.0</rate_limit>


        <clipto>


          <min>0.0</min>


          <max>1.0</max>


        </clipto>


        <output>fcs/esc-out[3]</output>


      </actuator>


    </channel>


    <channel name="Motor_4">


      <actuator name="fcs/esc/motor_4">


        <input>fcs/esc-cmd-norm[4]</input>


        <rate_limit>4.0</rate_limit>


        <clipto>


          <min>0.0</min>


          <max>1.0</max>


        </clipto>


        <output>fcs/esc-out[4]</output>


      </actuator>


    </channel>


    <channel name="Motor_5">


      <actuator name="fcs/esc/motor_5">


        <input>fcs/esc-cmd-norm[5]</input>


        <rate_limit>4.0</rate_limit>


        <clipto>


          <min>0.0</min>


          <max>1.0</max>


        </clipto>


        <output>fcs/esc-out[5]</output>


      </actuator>


    </channel>


    <channel name="Motor_6">


      <actuator name="fcs/esc/motor_6">


        <input>fcs/esc-cmd-norm[6]</input>


        <rate_limit>4.0</rate_limit>


        <clipto>


          <min>0.0</min>


          <max>1.0</max>


        </clipto>


        <output>fcs/esc-out[6]</output>


      </actuator>


    </channel>


    <channel name="Motor_7">


      <actuator name="fcs/esc/motor_7">


        <input>fcs/esc-cmd-norm[7]</input>


        <rate_limit>4.0</rate_limit>


        <clipto>


          <min>0.0</min>


          <max>1.0</max>


        </clipto>


        <output>fcs/esc-out[7]</output>


      </actuator>


    </channel>


    <channel name="Motor_8">


      <actuator name="fcs/esc/motor_8">


        <input>fcs/esc-cmd-norm[8]</input>


        <rate_limit>4.0</rate_limit>


        <clipto>


          <min>0.0</min>


          <max>1.0</max>


        </clipto>


        <output>fcs/esc-out[8]</output>


      </actuator>


    </channel>


    <channel name="VTail_Left">


      <actuator name="fcs/vtail/left">


        <input>fcs/vtail-left-cmd-norm</input>


        <rate_limit>2.0</rate_limit>


        <clipto>


          <min>-1.0</min>


          <max>1.0</max>


        </clipto>


        <output>fcs/vtail-left-pos-norm</output>


      </actuator>


    </channel>


    <channel name="VTail_Right">


      <actuator name="fcs/vtail/right">


        <input>fcs/vtail-right-cmd-norm</input>


        <rate_limit>2.0</rate_limit>


        <clipto>


          <min>-1.0</min>


          <max>1.0</max>


        </clipto>


        <output>fcs/vtail-right-pos-norm</output>


      </actuator>


    </channel>


    <channel name="Aileron_Left">


      <actuator name="fcs/aileron/left">


        <input>fcs/aileron-left-cmd-norm</input>


        <rate_limit>2.0</rate_limit>


        <clipto>


          <min>-1.0</min>


          <max>1.0</max>


        </clipto>


        <output>fcs/aileron-left-pos-norm</output>


      </actuator>


    </channel>


    <channel name="Aileron_Right">


      <actuator name="fcs/aileron/right">


        <input>fcs/aileron-right-cmd-norm</input>


        <rate_limit>2.0</rate_limit>


        <clipto>


          <min>-1.0</min>


          <max>1.0</max>


        </clipto>


        <output>fcs/aileron-right-pos-norm</output>


      </actuator>


    </channel>


    <channel name="Pusher_Tilt">


      <actuator name="fcs/pusher/tilt">


        <input>fcs/pusher-tilt-norm</input>


        <rate_limit>0.5</rate_limit>


        <clipto>


          <min>0.0</min>


          <max>1.0</max>


        </clipto>


        <output>fcs/pusher-tilt-pos-norm</output>


      </actuator>


    </channel>


  </system>


  <system name="motor-torque">


    <property value="0.0">fcs/torque_bypass</property>


    <channel name="Motor_Torques">


      <fcs_function name="fcs/motor_torque_total">


        <function>


          <sum>


            <product>


              <table>


                <independentVar>fcs/esc-out[0]</independentVar>


                <tableData>
                  0.0   0.0
                  0.5   0.25
                  1.0   0.50
                </tableData>


              </table>


              <value>1</value>


            </product>


            <product>


              <table>


                <independentVar>fcs/esc-out[2]</independentVar>


                <tableData>
                  0.0   0.0
                  0.5   0.25
                  1.0   0.50
                </tableData>


              </table>


              <value>1</value>


            </product>


            <product>


              <table>


                <independentVar>fcs/esc-out[5]</independentVar>


                <tableData>
                  0.0   0.0
                  0.5   0.25
                  1.0   0.50
                </tableData>


              </table>


              <value>1</value>


            </product>


            <product>


              <table>


                <independentVar>fcs/esc-out[7]</independentVar>


                <tableData>
                  0.0   0.0
                  0.5   0.25
                  1.0   0.50
                </tableData>


              </table>


              <value>1</value>


            </product>


            <product>


              <table>


                <independentVar>fcs/esc-out[1]</independentVar>


                <tableData>
                  0.0   0.0
                  0.5   0.25
                  1.0   0.50
                </tableData>


              </table>


              <value>-1</value>


            </product>


            <product>


              <table>


                <independentVar>fcs/esc-out[3]</independentVar>


                <tableData>
                  0.0   0.0
                  0.5   0.25
                  1.0   0.50
                </tableData>


              </table>


              <value>-1</value>


            </product>


            <product>


              <table>


                <independentVar>fcs/esc-out[4]</independentVar>


                <tableData>
                  0.0   0.0
                  0.5   0.25
                  1.0   0.50
                </tableData>


              </table>


              <value>-1</value>


            </product>


            <product>


              <table>


                <independentVar>fcs/esc-out[6]</independentVar>


                <tableData>
                  0.0   0.0
                  0.5   0.25
                  1.0   0.50
                </tableData>


              </table>


              <value>-1</value>


            </product>


          </sum>


        </function>


        <output>fcs/net_motor_torque</output>


      </fcs_function>


    </channel>


  </system>


  <external_reactions>


    <property value="0.0">fcs/esc-out[0]</property>


    <property value="0.0">fcs/esc-out[1]</property>


    <property value="0.0">fcs/esc-out[2]</property>


    <property value="0.0">fcs/esc-out[3]</property>


    <property value="0.0">fcs/esc-out[4]</property>


    <property value="0.0">fcs/esc-out[5]</property>


    <property value="0.0">fcs/esc-out[6]</property>


    <property value="0.0">fcs/esc-out[7]</property>


    <property value="0.0">fcs/esc-out[8]</property>


    <property value="0.0">fcs/pusher-tilt-pos-norm</property>


    <property value="1.0">fcs/motor_health[0]</property>


    <property value="1.0">fcs/motor_health[1]</property>


    <property value="1.0">fcs/motor_health[2]</property>


    <property value="1.0">fcs/motor_health[3]</property>


    <property value="1.0">fcs/motor_health[4]</property>


    <property value="1.0">fcs/motor_health[5]</property>


    <property value="1.0">fcs/motor_health[6]</property>


    <property value="1.0">fcs/motor_health[7]</property>


    <property value="1.0">fcs/motor_health[8]</property>


    <force name="MOTOR_0_LIFT" frame="BODY">


      <function>


        <product>


          <table>


            <independentVar>fcs/esc-out[0]</independentVar>


            <tableData>
              0.0    0.0
              0.10   1.8
              0.33   6.0
              0.50  12.0
              0.67  19.2
              1.0   30.0
            </tableData>


          </table>


          <property>fcs/motor_health[0]</property>


        </product>


      </function>


      <location unit="M">


        <x>0.050</x>


        <y>0.350</y>


        <z>-0.074</z>


      </location>


      <direction>


        <x>0.0</x>


        <y>0.0</y>


        <z>-1.0</z>


      </direction>


    </force>


    <force name="MOTOR_1_LIFT" frame="BODY">


      <function>


        <product>


          <table>


            <independentVar>fcs/esc-out[1]</independentVar>


            <tableData>
              0.0    0.0
              0.10   1.8
              0.33   6.0
              0.50  12.0
              0.67  19.2
              1.0   30.0
            </tableData>


          </table>


          <property>fcs/motor_health[1]</property>


        </product>


      </function>


      <location unit="M">


        <x>0.710</x>


        <y>0.350</y>


        <z>-0.074</z>


      </location>


      <direction>


        <x>0.0</x>


        <y>0.0</y>


        <z>-1.0</z>


      </direction>


    </force>


    <force name="MOTOR_2_LIFT" frame="BODY">


      <function>


        <product>


          <table>


            <independentVar>fcs/esc-out[2]</independentVar>


            <tableData>
              0.0    0.0
              0.10   1.8
              0.33   6.0
              0.50  12.0
              0.67  19.2
              1.0   30.0
            </tableData>


          </table>


          <property>fcs/motor_health[2]</property>


        </product>


      </function>


      <location unit="M">


        <x>0.050</x>


        <y>0.800</y>


        <z>-0.074</z>


      </location>


      <direction>


        <x>0.0</x>


        <y>0.0</y>


        <z>-1.0</z>


      </direction>


    </force>


    <force name="MOTOR_3_LIFT" frame="BODY">


      <function>


        <product>


          <table>


            <independentVar>fcs/esc-out[3]</independentVar>


            <tableData>
              0.0    0.0
              0.10   1.8
              0.33   6.0
              0.50  12.0
              0.67  19.2
              1.0   30.0
            </tableData>


          </table>


          <property>fcs/motor_health[3]</property>


        </product>


      </function>


      <location unit="M">


        <x>0.710</x>


        <y>0.800</y>


        <z>-0.074</z>


      </location>


      <direction>


        <x>0.0</x>


        <y>0.0</y>


        <z>-1.0</z>


      </direction>


    </force>


    <force name="MOTOR_4_LIFT" frame="BODY">


      <function>


        <product>


          <table>


            <independentVar>fcs/esc-out[4]</independentVar>


            <tableData>
              0.0    0.0
              0.10   1.8
              0.33   6.0
              0.50  12.0
              0.67  19.2
              1.0   30.0
            </tableData>


          </table>


          <property>fcs/motor_health[4]</property>


        </product>


      </function>


      <location unit="M">


        <x>0.050</x>


        <y>-0.350</y>


        <z>-0.074</z>


      </location>


      <direction>


        <x>0.0</x>


        <y>0.0</y>


        <z>-1.0</z>


      </direction>


    </force>


    <force name="MOTOR_5_LIFT" frame="BODY">


      <function>


        <product>


          <table>


            <independentVar>fcs/esc-out[5]</independentVar>


            <tableData>
              0.0    0.0
              0.10   1.8
              0.33   6.0
              0.50  12.0
              0.67  19.2
              1.0   30.0
            </tableData>


          </table>


          <property>fcs/motor_health[5]</property>


        </product>


      </function>


      <location unit="M">


        <x>0.710</x>


        <y>-0.350</y>


        <z>-0.074</z>


      </location>


      <direction>


        <x>0.0</x>


        <y>0.0</y>


        <z>-1.0</z>


      </direction>


    </force>


    <force name="MOTOR_6_LIFT" frame="BODY">


      <function>


        <product>


          <table>


            <independentVar>fcs/esc-out[6]</independentVar>


            <tableData>
              0.0    0.0
              0.10   1.8
              0.33   6.0
              0.50  12.0
              0.67  19.2
              1.0   30.0
            </tableData>


          </table>


          <property>fcs/motor_health[6]</property>


        </product>


      </function>


      <location unit="M">


        <x>0.050</x>


        <y>-0.800</y>


        <z>-0.074</z>


      </location>


      <direction>


        <x>0.0</x>


        <y>0.0</y>


        <z>-1.0</z>


      </direction>


    </force>


    <force name="MOTOR_7_LIFT" frame="BODY">


      <function>


        <product>


          <table>


            <independentVar>fcs/esc-out[7]</independentVar>


            <tableData>
              0.0    0.0
              0.10   1.8
              0.33   6.0
              0.50  12.0
              0.67  19.2
              1.0   30.0
            </tableData>


          </table>


          <property>fcs/motor_health[7]</property>


        </product>


      </function>


      <location unit="M">


        <x>0.710</x>


        <y>-0.800</y>


        <z>-0.074</z>


      </location>


      <direction>


        <x>0.0</x>


        <y>0.0</y>


        <z>-1.0</z>


      </direction>


    </force>


    <force name="MOTOR_8_PUSHER" frame="BODY">


      <function>


        <product>


          <table>


            <independentVar>fcs/esc-out[8]</independentVar>


            <tableData>
              0.0    0.0
              0.10   1.8
              0.33   6.0
              0.50  12.0
              0.67  19.2
              1.0   30.0
            </tableData>


          </table>


          <property>fcs/motor_health[8]</property>


          <property>fcs/pusher-tilt-pos-norm</property>


        </product>


      </function>


      <location unit="M">


        <x>1.220</x>


        <y>0.0</y>


        <z>-0.075</z>


      </location>


      <direction>


        <x>1.0</x>


        <y>0.0</y>


        <z>0.0</z>


      </direction>


    </force>


    <force name="MOTOR_8_PUSHER_VERT" frame="BODY">


      <function>


        <product>


          <table>


            <independentVar>fcs/esc-out[8]</independentVar>


            <tableData>
              0.0    0.0
              0.10   1.8
              0.33   6.0
              0.50  12.0
              0.67  19.2
              1.0   30.0
            </tableData>


          </table>


          <property>fcs/motor_health[8]</property>


          <difference>


            <value>1.0</value>


            <property>fcs/pusher-tilt-pos-norm</property>


          </difference>


        </product>


      </function>


      <location unit="M">


        <x>1.220</x>


        <y>0.0</y>


        <z>-0.075</z>


      </location>


      <direction>


        <x>0.0</x>


        <y>0.0</y>


        <z>-1.0</z>


      </direction>


    </force>


  </external_reactions>


  <aerodynamics>


    <function name="aero/coefficient/CL0">


      <description>Lift coefficient at zero angle of attack (disabled for hover)</description>


      <value>0.0</value>


    </function>


    <function name="aero/coefficient/CLalpha">


      <description>Lift curve slope - disabled for hover</description>


      <product>


        <value>0.0</value>


        <property>aero/alpha-rad</property>


      </product>


    </function>


    <function name="aero/coefficient/CL">


      <description>Total lift coefficient</description>


      <sum>


        <property>aero/coefficient/CL0</property>


        <property>aero/coefficient/CLalpha</property>


      </sum>


    </function>


    <function name="aero/coefficient/CD0">


      <description>Parasitic drag coefficient</description>


      <value>0.025</value>


    </function>


    <function name="aero/coefficient/CDi">


      <description>Induced drag coefficient (CL^2 / pi*AR*e)</description>


      <product>


        <property>aero/coefficient/CL</property>


        <property>aero/coefficient/CL</property>


        <value>0.035</value>


      </product>


    </function>


    <function name="aero/coefficient/CD">


      <description>Total drag coefficient</description>


      <sum>


        <property>aero/coefficient/CD0</property>


        <property>aero/coefficient/CDi</property>


      </sum>


    </function>


    <function name="aero/coefficient/CYbeta">


      <description>Side force due to sideslip</description>


      <product>


        <value>-0.4</value>


        <property>aero/beta-rad</property>


      </product>


    </function>


    <function name="aero/coefficient/Cm0">


      <description>Pitching moment at zero lift (disabled for hover - no wing moment)</description>


      <value>0.0</value>


    </function>


    <function name="aero/coefficient/Cmalpha">


      <description>Pitch stiffness (per radian) - negative = stable</description>


      <product>


        <value>-1.2</value>


        <property>aero/alpha-rad</property>


      </product>


    </function>


    <function name="aero/coefficient/Cmq">


      <description>Pitch damping</description>


      <product>


        <value>-15.0</value>


        <property>velocities/q-rad_sec</property>


        <property>metrics/cbarw-ft</property>


        <quotient>


          <value>1.0</value>


          <max>


            <property>velocities/vt-fps</property>


            <value>1.0</value>


          </max>


        </quotient>


      </product>


    </function>


    <function name="aero/coefficient/CmVtail">


      <description>V-tail elevator (ruddervator) effect on pitch</description>


      <product>


        <value>-0.8</value>


        <sum>


          <property>fcs/vtail-left-pos-norm</property>


          <property>fcs/vtail-right-pos-norm</property>


        </sum>


        <value>0.5</value>


      </product>


    </function>


    <function name="aero/coefficient/Cm">


      <description>Total pitching moment coefficient</description>


      <sum>


        <property>aero/coefficient/Cm0</property>


        <property>aero/coefficient/Cmalpha</property>


        <property>aero/coefficient/Cmq</property>


        <property>aero/coefficient/CmVtail</property>


      </sum>


    </function>


    <function name="aero/coefficient/Clp">


      <description>Roll damping</description>


      <product>


        <value>-0.5</value>


        <property>velocities/p-rad_sec</property>


        <property>metrics/bw-ft</property>


        <quotient>


          <value>1.0</value>


          <max>


            <property>velocities/vt-fps</property>


            <value>1.0</value>


          </max>


        </quotient>


      </product>


    </function>


    <function name="aero/coefficient/Clbeta">


      <description>Dihedral effect</description>


      <product>


        <value>-0.1</value>


        <property>aero/beta-rad</property>


      </product>


    </function>


    <function name="aero/coefficient/ClAileron">


      <description>Aileron roll control</description>


      <product>


        <value>0.15</value>


        <difference>


          <property>fcs/aileron-right-pos-norm</property>


          <property>fcs/aileron-left-pos-norm</property>


        </difference>


      </product>


    </function>


    <function name="aero/coefficient/Cl">


      <description>Total rolling moment coefficient</description>


      <sum>


        <property>aero/coefficient/Clp</property>


        <property>aero/coefficient/Clbeta</property>


        <property>aero/coefficient/ClAileron</property>


      </sum>


    </function>


    <function name="aero/coefficient/Cnr">


      <description>Yaw damping</description>


      <product>


        <value>-0.15</value>


        <property>velocities/r-rad_sec</property>


        <property>metrics/bw-ft</property>


        <quotient>


          <value>1.0</value>


          <max>


            <property>velocities/vt-fps</property>


            <value>1.0</value>


          </max>


        </quotient>


      </product>


    </function>


    <function name="aero/coefficient/Cnbeta">


      <description>Weathercock stability (V-tail)</description>


      <product>


        <value>0.12</value>


        <property>aero/beta-rad</property>


      </product>


    </function>


    <function name="aero/coefficient/CnVtail">


      <description>V-tail rudder (ruddervator) effect on yaw</description>


      <product>


        <value>0.08</value>


        <difference>


          <property>fcs/vtail-left-pos-norm</property>


          <property>fcs/vtail-right-pos-norm</property>


        </difference>


      </product>


    </function>


    <function name="aero/coefficient/Cn">


      <description>Total yawing moment coefficient</description>


      <sum>


        <property>aero/coefficient/Cnr</property>


        <property>aero/coefficient/Cnbeta</property>


        <property>aero/coefficient/CnVtail</property>


      </sum>


    </function>


    <axis name="LIFT">


      <function name="aero/force/Lift">


        <description>Lift force</description>


        <product>


          <property>aero/qbar-psf</property>


          <property>metrics/Sw-sqft</property>


          <property>aero/coefficient/CL</property>


        </product>


      </function>


    </axis>


    <axis name="DRAG">


      <function name="aero/force/Drag">


        <description>Drag force</description>


        <product>


          <property>aero/qbar-psf</property>


          <property>metrics/Sw-sqft</property>


          <property>aero/coefficient/CD</property>


        </product>


      </function>


    </axis>


    <axis name="SIDE">


      <function name="aero/force/Side">


        <description>Side force</description>


        <product>


          <property>aero/qbar-psf</property>


          <property>metrics/Sw-sqft</property>


          <property>aero/coefficient/CYbeta</property>


        </product>


      </function>


    </axis>


    <axis name="ROLL">


      <function name="aero/moment/Roll">


        <description>Rolling moment</description>


        <product>


          <property>aero/qbar-psf</property>


          <property>metrics/Sw-sqft</property>


          <property>metrics/bw-ft</property>


          <property>aero/coefficient/Cl</property>


        </product>


      </function>


    </axis>


    <axis name="PITCH">


      <function name="aero/moment/Pitch">


        <description>Pitching moment</description>


        <product>


          <property>aero/qbar-psf</property>


          <property>metrics/Sw-sqft</property>


          <property>metrics/cbarw-ft</property>


          <property>aero/coefficient/Cm</property>


        </product>


      </function>


    </axis>


    <axis name="YAW">


      <function name="aero/moment/Yaw_aero">


        <description>Aerodynamic yawing moment</description>


        <product>


          <property>aero/qbar-psf</property>


          <property>metrics/Sw-sqft</property>


          <property>metrics/bw-ft</property>


          <property>aero/coefficient/Cn</property>


        </product>


      </function>


      <function name="aero/moment/Yaw_motor">


        <description>Motor torque yawing moment</description>


        <sum>


          <property>fcs/net_motor_torque</property>


          <property>fcs/torque_bypass</property>


        </sum>


      </function>


    </axis>


  </aerodynamics>


  <system file="px4_default_imu_sensor"/>


  <system file="px4_default_gps_sensor"/>


  <system file="px4_default_baro_sensor"/>


</fdm_config>
